*Heading
 One Element Test of ABQ_PHASE_TRANS
**------------------------------------------------
*NODE, NSET=ALL
 1,  0., 0.,  0.
 2,  1., 0.,  0.
 3,  1., 1.,  0.
 4,  0., 1.,  0.
 5,  0., 0., 1.
 6,  1., 0., 1.
 7,  1., 1., 1.
 8,  0., 1., 1.
**------------------------------------------------
*ELEMENT, TYPE=DC3D8, ELSET=ALL
 1, 1, 2, 3, 4, 5, 6, 7, 8
**------------------------------------------------
*SOLID SECTION, ELSET=ALL, MATERIAL=ABQ_PHASE_TRANS_TI6AL4V
**------------------------------------------------
*PHYSICAL CONSTANTS, ABSOLUTE ZERO=-273.15, UNIVERSAL GAS CONSTANT=8.3144598E3
*INCLUDE, INPUT = ../src/Abaqus_PBF_Structure_model/ABQ_phase_trans_types.inp
*INCLUDE, INPUT = ../src/Abaqus_PBF_Structure_model/mat_phase_trans_ti64.inp
**------------------------------------------------
*INITIAL CONDITION, TYPE=TEMPERATURE
 All, 26.
*INITIAL CONDITION, TYPE=SOLUTION
 All, -1., , , , , , ,
 , , , , , , , , , , ,
*INITIAL CONDITION, TYPE=FIELD, VARIABLE=1
 ALL, -1.
**------------------------------------------------
*INCLUDE, INPUT=amp_temp_amprint.inp
*INCLUDE, INPUT=time_marks.inp
**------------------------------------------------
*STEP,NAME=Step-1,EXTRAPOLATION=NO, INC=100000000, UNSYMM=YES
*HEAT TRANSFER, end=PERIOD, deltmx=1000000.
increment, step_time, 0.0000001, increment
*BOUNDARY, AMPLITUDE=ASSIGN_LASER
 ALL, 11, 11, 1.
**
*OUTPUT,FIELD, TIME POINTS=LASERON, TIME MARKS=YES
*NODE OUTPUT
 NT
*ELEMENT OUTPUT
 TEMP, TEMPR
*OUTPUT,HISTORY, TIME POINTS=LASERON, TIME MARKS=YES
*ELEMENT OUTPUT, ELSET=ALL
 SDV, TEMPR, TEMP, FV
*END STEP
**------------------------------------------------
